# Задание тарифов
c := [7, 4, 5; 6, 3, 4; 4, 6, 5]
# Задание запасов
a := transpose([4, 5, 7])
b := transpose([6, 8, 2])
# Проверка на закрытость
sum(a) = 16
sum(b) = 16
# Задача закрытая
# Целевая функция
f(x) := sum(sum(c[i, j]*x[i, j], j = 0 .. 2), i = 0 .. 2)
# Опорный план
x := [4, 0, 0; 2, 3, 0; 0, 5, 2]
a = [4; 5; 7]
transpose(b) = [6, 8, 2]
# Задание вспомогательной матрицы
i := 0 .. 2
j := 0 .. 2
e[j, i] := 1
Ограничения
Given
(x*e)[:, 0] == a
transpose(e*x)[:, 0] == b
# Физический смысл
x ≥ 0
Решение
Z := Minimize(f, x)
-оптимальный*план
Z = [0, 3, 1; 0, 5, 0; 6, 0, 1]
# Цена
f(x) = 89
-неоптимальный*план
-оптимальный*план
f(Z) = 61
