ORIGIN := 1
m := 5
n := 5
i := 1 .. m
j := 1 .. n
C := [5, 2, 3, 8, 5; 7, 8, 6, 1, 3; 9, 0, 2, 4, 7; 5, 5, 7, 2, 3; 4, 1, 4, 5, 3]
A := [1; 1; 1; 1; 1]
B := [1; 1; 1; 1; 1]
e[1] := [1; 1; 1; 1; 1]
e[2] := [1; 1; 1; 1; 1]
# Начальное приближение
x := [0, 0, 0, 1, 0; 1, 0, 0, 0, 0; 0, 0, 0, 0, 0; 0, 0, 0, 0, 0; 0, 0, 0, 0, 0]
# Целевая функция
Z(x) := sum(sum(C[i, j]*x[i, j], j = 1 .. n), i = 1 .. m)
# Внутренняя функция
Given
x*e[1] == A
transpose(x)*e[2] == B
x ≥ 0
# Решение
TOL := 10
R := Maximize(Z, x)
R = [0, 0, 0, 1, 0; 0, 1, 0, 0, 0; 1, 0, 0, 0, 0; 0, 0, 1, 0, 0; 0, 0, 0, 0, 1]
Z(R) = 35
Given
x*e[1] == A
transpose(x)*e[2] == B
x ≥ 0
Q := Minimize(Z, x)
Q = [0, 0, 1, 0, 0; 0, 0, 0, 1, 0; 0, 1, 0, 0, 0; 0, 0, 0, 0, 1; 1, 0, 0, 0, 0]
Z(Q) = 11
